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/batch
! ANSYS input file written by Workbench version 2025 R2
! File used for geometry attach: C:\Users\alp\Desktop\ANSYS Projects\SPA-YouTube-new\SPA_1bewel_viscoelasticity_files\dp0\SYS\DM\SYS.agdb
/title,SPA_1bewel_viscoelasticity_slowTerm--Static Structural (A5)
/COM,/COM,     ANSYSMotion, 2025.2
/com,--- Data in consistent MKS units. See Solving Units in the help system for more information.
/units,MKS
/prep7
! Turn off shape checking because checks already performed inside WB mesher.
! See help system for more information.
SHPP,OFF,,NOWARN
etcon,set             ! allow ANSYS to choose best KEYOP's for 180x elements, resets any applicable keyopt to MAPDL defaults
/com,*********** Send User Defined Coordinate System(s) ***********
csys,0
/com,*********** Nodes for the whole assembly ***********
nblock,3,,3528
(1i9,3e20.9e3)
        1    -1.300000000E-01     1.100000000E-02     1.100000000E-02
        2    -1.300000000E-01     1.409905813E-02     1.055442271E-02
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-1
/com,*********** Nodes for all Remote Points ***********
nblock,3
(1i9,3e20.9e3)
     3209    -1.299999952E-01     1.099999997E-02    -3.499388965E-19
-1
/com,*********** Elements for Body 1 'Part 1' ***********
et,1,285
MAT,1 $ TYPE,1 $ REAL,1 $ SECNUM,1 $ ESYS,0
eblock,11,COMPACT,,10321
(11i9)
        1      445     2597      451     3188
        2      451     2597     2590     3188
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-1
secnum,1    ! reset the section ID to default
toffst,273.15,      ! Temperature offset from absolute zero
/com,*********** Set Reference Temperature ***********
tref,22.
/com,*********** Send Materials ***********
MP,DENS,1,1080,	! kg m^-3

TB,HYPE,1,1,2,YEOH
TBDATA,1,110000,20000,0,0

TB,PRONY,1,1,2,SHEAR
TBDATA,1,0.2,0.1,0.15,5

!************************* Model Summary ********************
!Part 1,	Elastomer Sample (Yeoh),	matid,	1
!************************* End Model Summary ********************
/com,*********** Create Contact "Frictionless - OuterWallsNew To OuterWallsNew" ***********
*set,tid,3
*set,cid,2
r,tid
r,cid
et,tid,170
et,cid,174
MAT,2 $ TYPE,2 $ REAL,2 $ SECNUM,2 $ ESYS,0
eblock,11,COMPACT,,3086
(11i9)
    16435      174      175     1215     1215
    16436      159      158     1214     1214
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-1
secnum,1    ! reset the section ID to default
MAT,3 $ TYPE,3 $ REAL,2 $ SECNUM,3 $ ESYS,0
eblock,11,COMPACT,,3086
(11i9)
    19521      174      175     1215     1215
    19522      159      158     1214     1214
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-1
secnum,1    ! reset the section ID to default
keyo,cid,8,2               ! auto create asymmetric contact (from Program Controlled setting)
keyo,cid,10,0              ! adjust contact stiffness each NR iteration (from Program Controlled setting)
keyo,cid,12,0              ! standard contact
keyo,cid,2,0               ! augmented Lagrange (from Program Controlled setting)
keyo,cid,4,0               ! on Gauss point (from Program Controlled setting)
keyo,cid,9,0               ! use real geometry with stepped effects
keyo,cid,7,0               ! No Prediction
rmod,cid,3,1.       ! FKN
rmod,cid,5,0.       ! ICONT
rmod,cid,6,0.       ! PINB
rmod,cid,10,0.      ! CNOF
rmod,cid,12,0.      ! FKT
rmod,cid,36,67      ! WB DSID
nsel,all
esel,all
/com,*********** Send Named Selection as Node Component ***********
CMBLOCK,INNER1NEW,NODE,        8
(8i10)
       315      -794      1883     -2850      2913     -2946      2975     -3009
/com,*********** Send Named Selection as Node Component ***********
CMBLOCK,OUTERWALLSNEW,NODE,       12
(8i10)
         1      -320       795     -1882      2851     -2912      2947     -2974
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/com,*********** Send Named Selection as Node Component ***********
CMBLOCK,FIXEDSUPPORT,NODE,        4
(8i10)
       293      -320      2947     -2974
/com,*********** Send Named Selection as Node Component ***********
CMBLOCK,TIPSURFACE,NODE,        5
(8i10)
         1       -22      3010     -3038      3200
/com,*********** Fixed Supports ***********
CMBLOCK,_FIXEDSU,NODE,        4
(8i10)
       293      -320      2947     -2974
cmsel,s,_FIXEDSU
d,all,all
nsel,all
/com,*********** Create Remote Point "Tip_centroid" ***********
*set,tid,5
*set,cid,4
et,cid,174
et,tid,170
keyo,tid,2,1               ! Don't fix the pilot node
keyo,tid,4,0               ! Activate all DOF's due to large deformation
keyo,cid,12,5              ! Bonded Contact
keyo,cid,4,1               ! Deformable RBE3 style load
keyo,cid,2,2               ! MPC style contact
MAT,4 $ TYPE,4 $ REAL,4 $ SECNUM,4 $ ESYS,0
eblock,11,COMPACT,,80
(11i9)
    22607     3015     3031     3019     3019
    22608     3013     3023     3030     3030
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-1
secnum,1    ! reset the section ID to default
*set,_npilot,3209
_npilot180=_npilot
type,tid
mat ,cid
real,cid
tshape,pilo
en,22687,_npilot
tshape
/com,*********** Define Pressure Using Surface Effect Elements "Pressure" ***********
et,6,154
MAT,6 $ TYPE,6 $ REAL,6 $ SECNUM,6 $ ESYS,0
eblock,11,COMPACT,,3026
(11i9)
    22688     2304     2307     2321     2321
    22689     2304     2321     2323     2323
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-1
secnum,1    ! reset the section ID to default
esel,s,type,,6
keyop,6,7,0         ! Use deformed area for application of load
esel,all
esel,all
fini
/com,****************************************************************************
/com,*************************    SOLUTION       ********************************
/com,****************************************************************************
/solu
antype,0                   ! static analysis
nlgeom,on                  ! Turn on Large Deformation Effects
_thickRatio=  1     ! Ratio of thick parts in the model
eqsl,sparse,,,,,1
cntr,print,1               ! print out contact info and also make no initial contact an error
cncheck,dmp		!	Enable program controlled contact splitting for distributed memory parallel run
dmpoption,emat,no             ! Don't combine emat file for DANSYS
dmpoption,esav,no             ! Don't combine esav file for DANSYS
nldiag,cont,iter           ! print out contact info each equilibrium iteration
rescontrol,define,last,last,,dele	   ! Program Controlled
/com,****************************************************
/com,******************* SOLVE FOR LS 1 OF 1 ****************
esel,s,type,,6
nsle
sf,all,pres,1.
nsel,all
esel,all
acel,9.80665,0.,0.
esel,all
autots,on                   ! User turned on automatic time stepping
deltim,0.1,0.0001,1,OFF
time,1.
outres,erase
outres,all,none
outres,nsol,all,
outres,rsol,all
outres,eangl,all
outres,etmp,all
outres,veng,all
outres,strs,all,
outres,epel,all,
outres,eppl,all,
outres,cont,all,
! *********** WB SOLVE COMMAND ***********
! check interactive state
*get,ANSINTER_,active,,int
*if,ANSINTER_,ne,0,then
/eof
*endif
solve
/com *************** Write FE CONNECTORS *********
CEWRITE,file,ce,,INTE
/com,****************************************************
/com,*************** FINISHED SOLVE FOR LS 1 *************
*get,_NSOLTHREADS,active,0,ntfs
*get,_NSOLPROCESSES,active,0,npfs
/post1
fini
